*PART, NAME=CABLEPART
**
*NODE,NSET=NODES_EAST
1001,-902.50000,-8.66000,48.00000
1002,-893.02667,-8.87133,53.27000
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**
**
*NODE,NSET=NODES_WEST
2001,-902.50000,8.66000,48.00000
2002,-893.02667,8.87133,53.27000
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**
**
*ELEMENT, TYPE=B31, ELSET=ELEMENTS_EAST
1001, 1001, 1002
1002, 1002, 1003
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**
**
*ELEMENT, TYPE=B31, ELSET=ELEMENTS_WEST
2001, 2001, 2002
2002, 2002, 2003
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**
**
*NSET, NSET=ANCH
1001,1263,2001,2263
**
**
*NSET, NSET=TOP
1031,1233,2031,2233
**
**
*NSET, NSET=SPAN
1031,1032,1033,1034,1035,1036
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**
**
*BEAM GENERAL SECTION, ELSET=ELEMENTS_EAST, SECTION=GENERAL, DENSITY=7850.000
3.70000e-01, 1.08000e-04, 0.00000e+00, 1.08000e-04, 2.17000e-04
0.000, 1.000, 0.000
2.10000e+11, 8.10000e+10
**
*BEAM GENERAL SECTION, ELSET=ELEMENTS_WEST, SECTION=GENERAL, DENSITY=7850.000
3.70000e-01, 1.08000e-04, 0.00000e+00, 1.08000e-04, 2.17000e-04
0.000, 1.000, 0.000
2.10000e+11, 8.10000e+10
**
*NONSTRUCTURAL MASS, ELSET=ELEMENTS_EAST, UNITS=MASS PER LENGTH
5.00000e+01
**
*NONSTRUCTURAL MASS, ELSET=ELEMENTS_WEST, UNITS=MASS PER LENGTH
5.00000e+01
**
*END PART
**
***********************************************************
** ASSEMBLY
***********************************************************
*ASSEMBLY, NAME=CABLEASS
**
*INSTANCE, NAME=CABLEPART, PART=CABLEPART
**
*END INSTANCE
**
*END ASSEMBLY
**
**********
** Static
**********
*STEP , NLGEO=YES, NAME=STEP1
*STATIC
1e-6, 1, 1e-9, 1
**
*DLOAD, OP=NEW
, GRAV, 9.81000, 0 , 0, -1
**
*BOUNDARY, OP=NEW
CABLEPART.ANCH,1,4,0
**
**
*BOUNDARY, OP=NEW
CABLEPART.TOP,2,3,0
**
**
*OUTPUT, FIELD, FREQUENCY=100
*NODE OUTPUT
U
RF
COORD
**
*OUTPUT, FIELD, FREQUENCY=100
*ELEMENT OUTPUT
SF
**
*END STEP
**
**
**********
** Static
**********
*STEP , NLGEO=YES, NAME=STEP2
*STATIC
1e-3, 1, 1e-3, 1
**
*CLOAD, OP=MOD
CABLEPART.Span, 3, -8.633e+05
**
*OUTPUT, FIELD, FREQUENCY=100
*NODE OUTPUT
U
RF
COORD
**
*OUTPUT, FIELD, FREQUENCY=100
*ELEMENT OUTPUT
SF
**
*END STEP
**
**
